// SBML level 3 version 1

model Jana_WolfGlycolysis()

  // Compartments:
  compartment compartment_ = 1;

  // Species:
  species Glucose in compartment_ = 0;
  species fructose_1_6_bisphosphate in compartment_ = 0;
  species glyceraldehyde_3_phosphate in compartment_ = 0;
  species glycerate_3_phosphate in compartment_ = 0;
  species pyruvate in compartment_ = 0;
  species Acetyladehyde in compartment_ = 0;
  species External_acetaldehyde in compartment_ = 0;
  species ATP in compartment_ = 3/compartment_;
  species ADP in compartment_ = 1/compartment_;
  species NAD in compartment_ = 0.5/compartment_;
  species NADH in compartment_ = 0.5/compartment_;
  species $External_glucose in compartment_ = 0;
  species $ethanol in compartment_ = 0;
  species $Glycerol in compartment_ = 0;
  species $Sink in compartment_ = 0;

  // Parameters:
  J0_inputFlux = 50;
  J1_k1 = 550;
  J1_Ki = 1;
  J1_n = 4;
  J2_k = 9.8;
  J3_k = 85.7;
  J4_kg = 323.8;
  J4_kp = 76411.1;
  J4_ka = 57823.1;
  J4_kk = 23.7;
  J5_k = 80;
  J6_k = 9.7;
  J7_k = 2000;
  J8_k1 = 375;
  J8_k2 = 375;
  J9_k = 28;
  J10_k = 80;

  // Reactions:
  J0: $External_glucose => Glucose; J0_inputFlux;
  J1: Glucose + 2 ATP => fructose_1_6_bisphosphate + 2 ADP; J1_k1*Glucose*ATP*(1/(1 + (ATP/J1_Ki)^J1_n));
  J2: fructose_1_6_bisphosphate => glyceraldehyde_3_phosphate + glyceraldehyde_3_phosphate; J2_k*fructose_1_6_bisphosphate;
  J3: glyceraldehyde_3_phosphate + NADH => NAD + $Glycerol; J3_k*glyceraldehyde_3_phosphate*NADH;
  J4: glyceraldehyde_3_phosphate + ADP + NAD => ATP + glycerate_3_phosphate + NADH; (J4_kg*J4_kp*glyceraldehyde_3_phosphate*NAD*ADP - J4_ka*J4_kk*glycerate_3_phosphate*ATP*NADH)/(J4_ka*NADH + J4_kp*ADP);
  J5: glycerate_3_phosphate + ADP => ATP + pyruvate; J5_k*glycerate_3_phosphate*ADP;
  J6: pyruvate => Acetyladehyde; J6_k*pyruvate;
  J7: Acetyladehyde + NADH => NAD + $ethanol; J7_k*Acetyladehyde*NADH;
  J8: Acetyladehyde => External_acetaldehyde; J8_k1*Acetyladehyde - J8_k2*External_acetaldehyde;
  J9: ATP => ADP; J9_k*ATP;
  J10: External_acetaldehyde => $Sink; J10_k*External_acetaldehyde;
end
